folder simulations: version=37; creator=Apsim 7.9-r4044
  simulation Sultana_ms
    metfile met
    clock
      start_date = 01/01/1980  # Enter the start date of the simulation
      end_date = 31/12/2010  # Enter the end date of the simulation
    summaryfile
    area paddock
      Soil: SoilType=Black Vertosol; LocalName=Waco; Site=Jimbour; NearestTown=Jimbour, Q 4352; Region=South East Queensland; NaturalVegetation=Grassland, mainly Qld bluegrass; Latitude=0; Longitude=0; YearOfSampling=0
        InitialWater Initial water: FractionFull=1; PercentMethod=FilledFromTop
        Water
          Thickness  BD    AirDry  LL15  DUL   SAT
          150        1.02  0.15    0.29  0.54  0.59
          150        1.03  0.26    0.29  0.53  0.58
          300        1.02  0.29    0.29  0.54  0.59
          300        1.02  0.29    0.29  0.54  0.58
          300        1.06  0.3     0.3   0.52  0.57
          300        1.11  0.31    0.31  0.5   0.55
          300        1.12  0.32    0.32  0.5   0.55
          300        1.15  0.33    0.33  0.48  0.53
          300        1.18  0.34    0.34  0.47  0.52
          300        1.2   0.35    0.35  0.46  0.51
          300        1.25  0.36    0.36  0.44  0.49
          SoilCrop Barley
            LL=[0.29, 0.29, 0.32, 0.38, 0.39, 0.39, 0.41, 0.48, 0.47, 0.46, 0.44]
            KL=[0.1, 0.1, 0.08, 0.06, 0.04, 0.02, 0.01, 0, 0, 0, 0]
            XF=[1, 1, 1, 1, 1, 1, 1, 0, 0, 0, 0]
          SoilCrop soybean
            LL=[0.29, 0.29, 0.32, 0.38, 0.39, 0.39, 0.41, 0.48, 0.47, 0.46, 0.44]
            KL=[0.1, 0.1, 0.08, 0.06, 0.04, 0.02, 0.01, 0, 0, 0, 0]
            XF=[1, 1, 1, 1, 1, 1, 1, 0, 0, 0, 0]
          SoilCrop Lucerne
            LL=[0.29, 0.29, 0.29, 0.29, 0.3, 0.31, 0.32, 0.33, 0.34, 0.35, 0.36]
            KL=[0.1, 0.1, 0.1, 0.1, 0.09, 0.09, 0.09, 0.09, 0.09, 0.09, 0.09]
            XF=[1, 1, 1, 1, 1, 1, 1, 1, 1, 1, 1]
          SoilCrop Maize
            LL=[0.29, 0.29, 0.34, 0.34, 0.37, 0.4, 0.42, 0.48, 0.47, 0.46, 0.44]
            KL=[0.1, 0.1, 0.1, 0.08, 0.06, 0.04, 0.02, 0, 0, 0, 0]
            XF=[1, 1, 1, 1, 1, 1, 1, 0, 0, 0, 0]
          SoilCrop Perennial Grass
            LL=[0.29, 0.29, 0.39, 0.41, 0.4, 0.4, 0.41, 0.41, 0.4, 0.4, 0.42]
            KL=[0.1, 0.1, 0.1, 0.1, 0.09, 0.07, 0.05, 0, 0, 0, 0]
            XF=[1, 1, 1, 1, 1, 1, 1, 0, 0, 0, 0]
          SoilCrop Sorghum
            LL=[0.29, 0.29, 0.35, 0.38, 0.4, 0.4, 0.4, 0.48, 0.47, 0.46, 0.44]
            KL=[0.1, 0.1, 0.1, 0.08, 0.06, 0.04, 0.02, 0, 0, 0, 0]
            XF=[1, 1, 1, 1, 1, 1, 1, 0, 0, 0, 0]
          SoilCrop Wheat
            LL=[0.29, 0.29, 0.32, 0.32, 0.35, 0.38, 0.41, 0.48, 0.47, 0.46, 0.44]
            KL=[0.1, 0.1, 0.08, 0.06, 0.04, 0.02, 0.01, 0, 0, 0, 0]
            XF=[1, 1, 1, 1, 1, 1, 1, 0, 0, 0, 0]
        SoilWater: SummerCona=3.5; SummerU=6; SummerDate=1-Nov; WinterCona=3.5; WinterU=6; WinterDate=1-Apr; DiffusConst=40; DiffusSlope=16; Salb=0.13; CN2Bare=73; CNRed=20; CNCov=0.8; Thickness=[150, 150, 300, 300, 300, 300, 300, 300, 300, 300, 300]; SWCON=[0.3, 0.3, 0.3, 0.3, 0.3, 0.3, 0.3, 0.3, 0.3, 0.3, 0.3]
        SoilOrganicMatter: RootCN=40; RootWt=200; SoilCN=12.5; EnrACoeff=7.4; EnrBCoeff=0.2
          Thickness  OC    FBiom  FInert
          150        1.04  0.025  0.4
          150        0.89  0.02   0.6
          300        0.89  0.015  0.8
          300        0.89  0.01   0.9
          300        0.77  0.01   0.95
          300        0.45  0.01   0.95
          300        0.27  0.01   0.95
          300        0.22  0.01   0.95
          300        0.16  0.01   0.95
          300        0.13  0.01   0.95
          300        0.12  0.01   0.95
        Analysis
          Thickness  EC    PH
          150        0.2   8.4
          150        0.25  8.8
          300        0.31  9
          300        0.4   9.2
          300        0.59  9.2
          300        0.84  9.1
          300        0.93  9
          300        1.01  9
          300        1.06  8.9
          300        1.05  8.9
          300        1.01  8.9
        Sample Initial nitrogen
          Thickness  NO3    NH4
          150        6.503  0.599004
          150        2.101  0.100001
          300        2.101  0.100001
          300        1.701  0.100001
          300        1.701  0.100001
          300        1.701  0.100001
          300        1.701  0.100001
          300        1.701  0.100001
          300        1.701  0.100001
          300        1.701  0.100001
          300        1.701  0.100001
      surfaceom SurfaceOrganicMatter
        PoolName = wheat  # Organic Matter pool name
        type = wheat  # Organic Matter type
        mass = 1000  # Initial surface residue (kg/ha)
        cnr = 80  # C:N ratio of initial residue
        standing_fraction = 0  # Fraction of residue standing
      fertiliser
      soybean
        ini: filename=apsimfiles\apsimfiles\Soybean.xml
      maize
        ini: filename=apsimfiles\apsimfiles\Maize.xml
      folder Manager folder
        manager Reset water, nitrogen, surfaceOM and phosphorus on fixed date
          # When should a reset be done
          reset_date = 01-jan  # Enter date of reset (dd-mmm)
          # Reset details
          soilmodule = soil_003  # Name of your soil module
          surfaceommodule = SurfaceOrganicMatter  # Name of your surface organic matter module
          pmodule = Phosphorus  # Name of your phosphorus module
          resetWater = no  # Reset soil water?
          resetNitrogen = no  # Reset soil nitrogen?
          resetSurfaceOM = no  # Reset surface organic matter?
          resetP = no  # Reset phosphorus?
          on start_of_day:
```
         if (today = date('[reset_date]')) then
            resetWater = '[resetWater]'
            resetNitrogen  = '[resetNitrogen]'
            resetSurfaceOM = '[resetSurfaceOM]'
            resetP = '[resetP]'
            if (resetWater = 'yes') then
                '[soilmodule] Water' reset
            endif
            if (resetNitrogen = 'yes') then
                '[soilmodule] Nitrogen' reset
            endif
            if (resetSurfaceOM = 'yes') then
                '[surfaceommodule]' reset
            endif
            if (resetP = 'yes') then
                '[pmodule]' reset
            endif
            act_mods reseting
         endif
```
        manager Empty manager
          on init:
```
soilt=0

avt7=0
soilt5=0
Nmin = 0.0
Nmin5 = 0.0

nmin_root=0
AWC_30_sow=0
AWC_60_sow=0
AWC_90_sow=0


AWC_30_harv=0
AWC_60_harv=0
AWC_90_harv=0

soil_water=0


trans=0
```
          on start_of_day:
```
soilt=st(1)


avt7=(maxt[7] + mint[7])/7/2
soilt5=(soilt[5])/5
```
          on end_of_day:
```
AWC_30_sow=sw(1)*100-ll15(1)*100+sw(2)*200-ll15(2)*200
AWC_60_sow=sw(3)*200-ll15(3)*200+sw(4)*100-ll15(4)*100
AWC_90_sow=sw(5)*100-ll15(5)*100+sw(6)*200-ll15(6)*200


AWC_30_harv=sw(1)*100-ll15(1)*100+sw(2)*200-ll15(2)*200
AWC_60_harv=sw(3)*200-ll15(3)*200+sw(4)*100-ll15(4)*100
AWC_90_harv=sw(5)*100-ll15(5)*100+sw(6)*200-ll15(6)*200


soil_water=esw-sw(9)*300-ll15(10)*300 

if (dlt_n_min>0) then 
Nmin5 = dlt_n_min 
endif

if (dlt_n_min=0) then 
Nmin5 = 0 
endif




model = 'AP'

trans=paddock.soybean.ep+paddock.maize.ep
```
        accum accum maxT 10: variable=maxt[7]  # variable
        accum accum minT 10: variable=mint[7]  # variable
        accum accum soilt 10: variable=soilt[5]  # variable
        manager Sow on a fixed date
          # Sowing criteria
          date = 19-may  # Enter sowing date (dd-mmm)
          # Sowing parameters
          crop = soybean  # Enter name of crop to sow
          density_soybean = 50  # Enter sowing density (plants/m2)
          depth = 50  # Enter sowing depth (mm)
          cultivar_soybean = Sultana  # Enter cultivar
          class = plant  # Enter crop growth class
          row_spacing = 500  # Enter row spacing (mm)
          on start_of_day:
```
!!!!Wheat

           if (paddock_is_fallow() = 1 and fallowin <> 'yes' and (nextcrop = 0 or nextcrop = 'soybean')) then
              if (date_within('15-mar, 15-may') = 1) then
		if (avt7 > 9 and soilt5>7) or
                   ('yes' = 'yes' and today = date('15-may'))) then
        choosenextcrop = 'yes'
        soybean sow plants = 45, sowing_depth = 30, cultivar = [cultivar_soybean], row_spacing = 250, crop_class = plant
     endif
     if today = date('10-nov') then
        choosenextcrop = 'yes'
     endif
              endif
           endif


!!!!Wheat

           if (paddock_is_fallow() = 1 and fallowin <> 'yes' and (nextcrop = 0 or nextcrop = 'maize')) then
              if (date_within('15-mar, 15-may') = 1) then
		if (avt7 > 9 and soilt5>7) or
                   ('yes' = 'yes' and today = date('15-may'))) then
        choosenextcrop = 'yes'
        maize sow plants = 7, sowing_depth = 30, cultivar = Pioneer_P04612XR_106, row_spacing = 0.9, crop_class = plant
     endif
     if today = date('10-nov') then
        choosenextcrop = 'yes'
     endif
              endif
           endif
```
        manager Rotations
          # Fallow options
          SummerFallowName = sf  # Enter summer fallow name
          SummerFallowEndDate = 15-oct  # Enter summer fallow END date (dd-mmm)
          WinterFallowName = wf  # Enter winter fallow name
          WinterFallowEndDate = 23-feb  # Enter winter fallow END date (dd-mmm)
          # Crop rotation sequence
          crop1 = maize  # Enter 1st crop
          crop2 = soybean  # Enter 2nd crop
          crop3 = nil  # Enter 3rd crop
          crop4 = nil  # Enter 4th crop
          crop5 = nil  # Enter 5th crop
          crop6 = nil  # Enter 6th crop
          crop7 = nil  # Enter 7th crop
          crop8 = nil  # Enter 8th crop
          crop9 = nil  # Enter 9th crop
          crop10 = nil  # Enter 10th crop
          crop11 = nil  # Enter 11th crop
          crop12 = nil  # Enter 12th crop
          crop13 = nil  # Enter 13th crop
          crop14 = nil  # Enter 14th crop
          crop15 = nil  # Enter 15th crop
          crop16 = nil  # Enter 16th crop
          crop17 = nil  # Enter 17th crop
          crop18 = nil  # Enter 18th crop
          crop19 = nil  # Enter 19th crop
          crop20 = nil  # Enter 20th crop
          on init:
```
         NextCropIndex = 1
         NextCrop = ' '
         ChooseNextCrop = 'yes'
         SummerFallowIn = 'no'
         WinterFallowIn = 'no'
         FallowIn = 'no'
```
          on start_of_day:
```
      if (ChooseNextCrop = 'yes') then
         if (NextCropIndex = 1) then
            NextCrop = '[crop1]'
         elseif (NextCropIndex = 2) then
            NextCrop = '[crop2]'
         elseif (NextCropIndex = 3) then
            NextCrop = '[crop3]'
         elseif (NextCropIndex = 4) then
            NextCrop = '[crop4]'
         elseif (NextCropIndex = 5) then
            NextCrop = '[crop5]'
         elseif (NextCropIndex = 6) then
            NextCrop = '[crop6]'
         elseif (NextCropIndex = 7) then
            NextCrop = '[crop7]'
         elseif (NextCropIndex = 8) then
            NextCrop = '[crop8]'
         elseif (NextCropIndex = 9) then
            NextCrop = '[crop9]'
         elseif (NextCropIndex = 10) then
            NextCrop = '[crop10]'
         elseif (NextCropIndex = 11) then
            NextCrop = '[crop11]'
         elseif (NextCropIndex = 12) then
            NextCrop = '[crop12]'
         elseif (NextCropIndex = 13) then
            NextCrop = '[crop13]'
         elseif (NextCropIndex = 14) then
            NextCrop = '[crop14]'
         elseif (NextCropIndex = 15) then
            NextCrop = '[crop15]'
         elseif (NextCropIndex = 16) then
            NextCrop = '[crop16]'
         elseif (NextCropIndex = 17) then
            NextCrop = '[crop17]'
         elseif (NextCropIndex = 18) then
            NextCrop = '[crop18]'
         elseif (NextCropIndex = 19) then
            NextCrop = '[crop19]'
         elseif (NextCropIndex = 20) then
            NextCrop = '[crop20]'
         endif
         if (NextCrop = 'nil' or NextCrop = ' ') then
            NextCrop = '[crop1]'
            NextCropIndex = 1
         endif
         NextCropIndex = NextCropIndex + 1
         ChooseNextCrop = 'no'
      endif
      ! if the next crop is due to be a fallow and we're within the
      ! correct date range then put a fallow in.
      if (NextCrop = '[WinterFallowName]') then
         if (paddock_is_fallow() = 1 and FallowIn = 'no') then
            if (date_within('[SummerFallowEndDate], [WinterFallowEndDate]') then
               WinterFallowIn = 'yes'
               FallowIn = 'yes'
               ChooseNextCrop = 'yes'
            endif
         endif
      elseif (NextCrop = '[SummerFallowName]') then
         if (paddock_is_fallow() = 1 and FallowIn = 'no') then
            if (date_within('[WinterFallowEndDate], [SummerFallowEndDate]') then
               SummerFallowIn = 'yes'
               FallowIn = 'yes'
               ChooseNextCrop = 'yes'
            endif
         endif
      endif

      ! if we currently have a fallow in and we're at the end of the fallow window
      ! then remove the fallow.
      if (WinterFallowIn = 'yes' and today = date('[WinterFallowEndDate]')+1) then
         WinterFallowIn = 'no'
         FallowIn = 'no'
      endif
      if (SummerFallowIn = 'yes' and today = date('[SummerFallowEndDate]')+1) then
         SummerFallowIn = 'no'
         FallowIn = 'no'
      endif
```
        tracker
          variable:
            maximum of maize.lai on last 200 end_of_day as maize_lai
            maximum of soybean.lai on last 200 end_of_day as soybean_lai
            maximum of maize.biomass on last 200 end_of_day as maize_biomass
            maximum of soybean.biomass on last 200 end_of_day as soybean_biomass
            maximum of maize.yield on last 200 end_of_day as maize_yield
            maximum of soybean.yield on last 200 end_of_day as soybean_yield
            sum of trans on end_day from sowing to harvesting as sum_ep
            sum of irrigation on end_day from sowing to harvesting as sum_irri
            sum of es on end_day from sowing to harvesting as sum_es
            sum of runoff on end_day from sowing to harvesting as sum_runoff
            sum of Nmin5 on end_day from sowing to harvesting as sum_Nmin
        manager Fertilise at sowing
          # When should fertiliser be applied
          modulename = maize  # On which module should the event come from
          eventname = sowing  # On which event should fertiliser be applied
          # Fertiliser application details
          fertmodule = fertiliser  # Module used to apply the fertiliser
          fert_amount_sow = 80  # Amount of starter fertiliser at sowing (kg/ha)
          fert_type_sow = urea_N  # Sowing fertiliser type
          on [modulename].[eventname]:
```
        [fertmodule] apply amount = [fert_amount_sow] (kg/ha), depth = 50 (mm), type = [fert_type_sow]
```
        irrigation
          automatic_irrigation = off
          asw_depth = 600  # Depth to which ASW is calculated. (mm)
          crit_fr_asw = 1  # Fraction of ASW below which irrigation is applied (0-1.0)
          irrigation_efficiency = 1  # Efficiency of the irrigation. (0-1.0)
          irrigation_allocation = off  # Allocation limits
          allocation = 0  # Allocation in mm
          default_no3_conc = 0.0  # Nitrate concentration (ppm N)
          default_nh4_conc = 0.0  # Ammonium concentration (ppm N)
          default_cl_conc = 0.0  # Chloride concentration (ppm Cl)
        manager Harvesting rule1
          # Harvesting criteria
          crop = maize  # Enter name of crop to harvest when ripe
          on end_of_day:
```
           if ([crop].StageName = 'harvest_ripe' or today = date('31-oct')) then
              [crop]  harvest
              [crop]  end_crop
           endif
```
        manager Harvesting rule
          # Harvesting criteria
          crop = soybean  # Enter name of crop to harvest when ripe
          on end_of_day:
          script: same as in Sultana_ms.paddock.Manager folder.Harvesting rule1
        manager Fertilise on days after sowing - top up
          # When should fertiliser be applied
          modulename = maize  # On which crop is fertiliser being applied
          fert_das = 35  # Enter fertiliser days after sowing
          fert_criteria = 100  # Amount of N required in top 3 layers (kg/ha)
          # Fertiliser application details
          fertmodule = fertiliser  # Module used to apply the fertiliser
          fert_type = urea_N  # Fertiliser type
          on start_of_day:
```
         if ([modulename].DaysAfterSowing = [fert_das]) then
            N_deficit = [fert_criteria]
            '[fertmodule]' apply amount = N_deficit (kg/ha), depth = 50 (mm), type = [fert_type] ()
         endif
```
        manager Output_emerg
          # output
          outputfile = emerg  # Name of outputfile component
          on end_of_day:
```
         if (paddock.maize.stage = 3.0   ) then
            '[outputfile]' do_output
         endif

         if (paddock.soybean.stage = 3.0   ) then
            '[outputfile]' do_output
         endif
```
        manager Output_flowering
          # output
          outputfile = flowering  # Name of outputfile component
          on end_of_day:
```
         if (paddock.maize.stage = 7.0   ) then
            '[outputfile]' do_output
         endif

         if (paddock.soybean.stage = 6.0   ) then
            '[outputfile]' do_output
         endif
```
        manager Output_maturity
          # output
          outputfile = maturity  # Name of outputfile component
          on end_of_day:
```
         if (paddock.maize.stage = 10.0   ) then
            '[outputfile]' do_output
         endif

         if (paddock.soybean.stage = 9.0   ) then
            '[outputfile]' do_output
         endif
```
      outputfile sowing: filename=soy sowing.out; title=soy sowing
        variables
          variables: day as SowDOY, AWC_30_sow format 0, AWC_60_sow format 0, AWC_90_sow format 0, year, title
        events Reporting Frequency: event=sowing
      outputfile emerg: filename=soy emerg.out; title=soy emerg; events=Reporting Frequency
        variables
          variables: day as EmergDOY, year, title
      outputfile flowering: filename=soy flowering.out; title=soy flowering; events=Reporting Frequency
        variables
          variables: title, day as AntDOY, year
      outputfile maturity: filename=soy maturity.out; title=soy maturity; events=Reporting Frequency
        variables
          variables: year, day as MatDOY, title
      outputfile harvesting: filename=soy harvesting.out; title=soy harvesting
        variables
          variables: model, year format 0, CO2, maize_lai format 2, soybean_lai format 2, maize_biomass format 1, soybean_biomass format 1, maize_yield format 0, soybean_yield format 0, day as HarvDOY, sum_irri, sum_ep, sum_es, sum_runoff, sum_Nmin, grain_n, AWC_30_harv format 0, AWC_60_harv format 0, AWC_90_harv format 0, title
        events Reporting Frequency: event=harvesting
